<Lems>

<!-- Specify which component to run -->
<Target component="sim1" reportFile="report.regular_dl.__SIMULATOR__.txt"/>

<!-- Include core NeuroML2 ComponentType definitions -->
<Include file="Cells.xml"/>
<Include file="Networks.xml"/>
<Include file="Simulation.xml"/>

<Include file="HindmarshRose1984Cell.xml"/>

<!-- parameter set for regular saddle-node/homoclinic (aka square wave) bursting -->
<hindmarshRose1984Cell id="hr_regular" a="1.0" b="3.0" c="-3.0"
    d="5.0" s="4.0" x1="-1.3" r="0.002"
    x0="-1.1" y0="-9" z0="1.0" v_scaling="35mV" C="28.57142857 pF"/>

<pulseGenerator id="Iext" delay="0ms" duration="2000ms" amplitude="5nA"/>

<network id="net1">
    <population id="hr_regular_pop" component="hr_regular" size="1"/>

    <explicitInput target="hr_regular_pop[0]" input="Iext" destination="synapses"/>
</network>

<Simulation id="sim1" length="1.4s" step="0.0025ms" target="net1">

    <Display id="d0" title="Hindmarsh-Rose v"
        timeScale="1ms" xmin="-100" xmax="1500" ymin="-80" ymax="60">
        <Line id ="v" quantity="hr_regular_pop[0]/v" scale="1mV"
            color="#0FFFF0" timeScale="1ms"/>
    </Display>

    <Display id="d1" title="Hindmarsh-Rose variables"
        timeScale="1ms" xmin="-100" xmax="1500" ymin="-3" ymax="3">
        <Line id ="x" quantity="hr_regular_pop[0]/x" scale="1"
            color="#000000" timeScale="1ms"/>
    </Display>

    <Display id="d2" title="y timeseries"
        timeScale="1ms" xmin="-100" xmax="1500" ymin="-20" ymax="0">
        <Line id ="y" quantity="hr_regular_pop[0]/y" scale="1"
            color="#0000ff" timeScale="1ms"/>
    </Display>

    <Display id="d3" title="z timeseries"
        timeScale="1ms" xmin="-100" xmax="1500" ymin="0.5" ymax="1.5">
        <Line id ="z" quantity="hr_regular_pop[0]/z" scale="1"
            color="#00ff00" timeScale="1ms"/>
    </Display>

    <Display id="spiking" title="spiking"
        timeScale="1ms" xmin="-100" xmax="1500" ymin="-0.1" ymax="1.1">
        <Line id ="z" quantity="hr_regular_pop[0]/spiking" scale="1"
            color="#ffffff" timeScale="1ms"/>
    </Display>

    <OutputFile id="of0" fileName="hr_nml.dat">
      <OutputColumn id="x" quantity="hr_regular_pop[0]/x"/>
      <OutputColumn id="y" quantity="hr_regular_pop[0]/y"/>
      <OutputColumn id="z" quantity="hr_regular_pop[0]/z"/>
      <OutputColumn id="v" quantity="hr_regular_pop[0]/v"/>
    </OutputFile>

</Simulation>

</Lems>
