<neuroml xmlns="http://www.neuroml.org/schema/neuroml2"  xmlns:xs="http://www.w3.org/2001/XMLSchema" xmlns:xsi="http://www.w3.org/2001/XMLSchema-instance" xsi:schemaLocation="http://www.neuroml.org/schema/neuroml2 https://raw.github.com/NeuroML/NeuroML2/development/Schemas/NeuroML2/NeuroML_v2.3.1.xsd" id="HindmarshRoseNeuron">
    <hindmarshRose1984Cell id="hr_regular" C="28.57142857pF" a="1.0" b="3.0" c="-3.0" d="5.0" s="4.0" x1="-1.3" r="0.002" x0="-1.1" y0="-9" z0="1.0" v_scaling="35.0mV"/>
    <pulseGenerator id="pulseGen_0" delay="0s" duration="1000s" amplitude="5nA"/>
    <network id="HRNet">
        <population id="HRPop0" component="hr_regular" size="1"/>
        <explicitInput target="HRPop0[0]" input="pulseGen_0" destination="synapses"/>
    </network>
</neuroml>
