<Lems xmlns="http://www.neuroml.org/lems/0.6"
      xmlns:xsi="http://www.w3.org/2001/XMLSchema-instance"
      xsi:schemaLocation="http://www.neuroml.org/lems/0.6 https://raw.github.com/LEMS/LEMS/master/Schemas/LEMS/LEMS_v0.6.xsd">

<Include file="../HindmarshRose3d.xml"/>

<!-- parameter set for regular saddle-node/homoclinic (aka square wave) busting -->
<hindmarshRoseCell id="hr_regular" a="1.0" b="3.0" c="-3.0"
    d="5.0" s="4.0" I="5.0" x1="-1.3" r="0.002"
    x0="-1.1" y0="-9" z0="1.0"/>

<network id="net1">
    <population id="hr_regular_pop" component="hr_regular" size="1"/>
</network>

</Lems>
